OpenVSP model (file version 5), 4 components.
Geometry view with OpenVSP parameter names; values to 6 digits, angles in degrees, lengths in the model's unit.
Overall bounding box: X_Min=0 X_Len=30 Y_Min=-12 Y_Len=24 Z_Min=-1.5 Z_Len=6.5

Fuselage "FuselageGeom"
  location (X Y Z) 0 0 0, rotation 0 0 0
  bounding box size 30 4 3
  Design: Length=30
  cross sections:
    n  XLocPercent  YLocPercent  ZLocPercent  shape
    0  0            0            0            rounded rectangle RoundRectXSec_Radius=0.2 RoundedRect_Height=0 RoundedRect_Width=0
    1  0.25         0            0            rounded rectangle RoundRectXSec_Radius=0.2 RoundedRect_Height=3 RoundedRect_Width=4
    2  0.5          0            0            as above
    3  0.75         0            0            as above
    4  1            0            0            rounded rectangle RoundRectXSec_Radius=0.2 RoundedRect_Height=0 RoundedRect_Width=0

Wing "WingGeom"
  location (X Y Z) 9 0 -0.5, rotation 0 0 0
  symmetric about XZ
  bounding box size 6 24 1.20047
  totals: TotalSpan=24 TotalProjectedSpan=24 TotalChord=6 TotalArea=144 TotalAR=4 MAC=6
  root: chord 6, twist 0, NACA 4-series Camber=0 CamberLoc=0.2 ThickChord=0.2
  sections:
    n  Span  Root_Chord  Tip_Chord  Area  Sweep  Sweep_Location  Dihedral  Twist  Twist_Location  tip airfoil
    1  12    6           6          72    0      0               0         0      0.25            as above

Wing "WingGeom"
  location (X Y Z) 27 0 0, rotation 0 0 0
  symmetric about XZ
  bounding box size 3 12 0.450195
  totals: TotalSpan=12 TotalProjectedSpan=12 TotalChord=3 TotalArea=36 TotalAR=4 MAC=3
  root: chord 3, twist 0, NACA 4-series Camber=0 CamberLoc=0.2 ThickChord=0.15
  sections:
    n  Span  Root_Chord  Tip_Chord  Area  Sweep  Sweep_Location  Dihedral  Twist  Twist_Location  tip airfoil
    1  6     3           3          18    0      0               0         0      0.25            as above

Wing "WingGeom"
  location (X Y Z) 27 0 0, rotation 90 0 0
  symmetric about XZ
  bounding box size 3 0.450195 5
  totals: TotalSpan=10 TotalProjectedSpan=10 TotalChord=3 TotalArea=30 TotalAR=3.33333 MAC=3
  root: chord 3, twist 0, NACA 4-series Camber=0 CamberLoc=0.2 ThickChord=0.15
  sections:
    n  Span  Root_Chord  Tip_Chord  Area  Sweep  Sweep_Location  Dihedral  Twist  Twist_Location  tip airfoil
    1  5     3           3          15    0      0               0         0      0.25            as above
